*HEADING
Preproc PINION_ROTOR_SunTooth_1_1_SunTooth_1_1_s1
*MATERIAL,NAME=GEARMATL
*ELASTIC,TYPE=ISOTROPIC
206000,0.3
*NODE
1,2.030855334,32.38212963,-22.5
2,3.132937768,32.27515087,-22.5
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*NSET,NSET=FREENDS
3,4,7,8,9,10
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*NSET,NSET=FIXDNDS
1,2,5,6,13,14
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*ELEMENT,TYPE=C3D8
1,1,2,3,4,5,6,7,8
2,4,3,9,10,8,7,11,12
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*ELSET,ELSET=GEARELMS
1,2,3,4,5,6
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*SOLID SECTION,MATERIAL=GEARMATL,ELSET=GEARELMS
*BOUNDARY
FIXDNDS,1,3
